# OpenSim document version 40000
ForceSet reserve_actuators:
  CoordinateActuator reserve_pelvis_tx: coordinate=pelvis_tx optimal_force=100
  CoordinateActuator reserve_pelvis_ty: coordinate=pelvis_ty optimal_force=1
  CoordinateActuator reserve_pelvis_tz: coordinate=pelvis_tz optimal_force=1
  CoordinateActuator reserve_pelvis_tilt: coordinate=pelvis_tilt optimal_force=1
  CoordinateActuator reserve_pelvis_list: coordinate=pelvis_list optimal_force=1
  CoordinateActuator reserve_pelvis_rotation: coordinate=pelvis_rotation optimal_force=1
  CoordinateActuator reserve_lumbar_extension: coordinate=lumbar_extension optimal_force=1
  CoordinateActuator reserve_lumbar_bending: coordinate=lumbar_bending optimal_force=1
  CoordinateActuator reserve_lumbar_rotation: coordinate=lumbar_rotation optimal_force=1
